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# Synchronous Buck Converter - CCM
# Losses Calculation
# AUTHOR: Igor Bertoncello Barboza
# SUPERVISION: Marco Dalla Costa
# PLACE/DATE: Santa Maria, October 10th, 2022
# Conventions
# Pico Farads ..............................................................................
pF := 1*10^-12*F
# Milli Ohms ................................................................................
mΩ := 1*10^-3*Ω
# Converter parameters
# Input power ...............................................................................
P_in := 18.48 W
# Input voltage .............................................................................
V_in := 399.96 V
# Output voltage ...........................................................................
V_out := 95.62 V
# Ambient temperature .................................................................
T_amb_C := 15.9
T_amb := (T_amb_C + 273.15)*K = 289.05 K
# Switching frequency ...................................................................
f_sw := 100 kHz
# Switching dead-time ..................................................................
t_d := 170 ns
# LED current ripple ................................................................,....
ΔI_LED := 277.74 mA - 116.65 mA = 161.09 mA
# Experimental data
# Measured efficiency ...................................................................
η_meas := 94.396 %
# Inductor
# Nominal inductance ...................................................................
L := 553 μH
# Series resistance ......................................................................
L_R := 360*mΩ
# Saturation current ......................................................................
I_Lsat := 3 A
# Vμs product at 100 Gauss ..........................................................
Vμs_100 := 12.01 V*μs
# Core constant ...........................................................................
K_0 := 96.62
# AC loss constant .......................................................................
K_1 := □  # error: This placeholder is empty.
# Hysteresis loss coefficient ..........................................................
K_h := 4*10^-5*W*s*T^-2.4*cm^-3
# Foucault loss coefficient (Frequency constant) ............................
K_f := 4*10^-10*W*s*T^-2.4*cm^-3
# Flux density constant ................................................................
K_b := 2.118
# Main switch - GaN HS GS-065-011-1-L
# Typical on-resistance .................................................................
QH_R_DS := 150*mΩ
# Typical gate resistance ..............................................................
QH_R_G := 1.4 Ω
# Typical input capacitance ...........................................................
QH_C_iss := 70*pF
# Typical output capacitance .........................................................
QH_C_oss := 20*pF
# Typical reverse capacitance ........................................................
QH_C_rss := 0.4*pF
# Typical total gate charge ............................................................
QH_Q_G := 2.2*nC
# Typical gate charge at threshold ..................................................
QH_Q_th := 1.3*nC
# Typical gate-to-source charge .....................................................
QH_Q_GS := 0.7*nC
# Typical gate-to-drain charge ........................................................
QH_Q_GD := 0.7*nC
QH_V_PL := 3.5 V
# Typical gate plateau voltage ........................................................
# On-resistance temperature coefficient (ΔRds/K) ...........................
QH_k_temp := 0 K^-1
# Synchronous Rectifier - GaN LS GS-065-011-1-L
# Typical on-resistance .................................................................
QL_R_DS := 150*mΩ
# Typical input capacitance ...........................................................
QL_C_iss := 70*pF
# Typical output capacitance .........................................................
QL_C_oss := 20*pF
# Typical reverse capacitance ........................................................
QL_C_rss := 0.4*pF
# Typical total gate charge ............................................................
QL_Q_G := 2.2*nC
# Typical source-to-drain voltage ....................................................
QL_V_SD := 1.7 V
# On-resistance temperature coefficient (ΔRds/K) ...........................
QL_k_temp := 0 K^-1
# Gate driver - MasterGaN
# Gate-source voltage ...................................................................
V_GS := 5.6 V
# External turn-on resistance .........................................................
R_G_on := 10 Ω
# External turn-off resistance .........................................................
R_G_off := 5.3 Ω
# IC internal turn-on resistance ......................................................
R_dvr_on := 0 Ω
# IC internal turn-off resistance ......................................................
R_dvr_off := 0 Ω
# IC operating current ...................................................................
I_dvr := 2.5 mA
# Initial calculations
# Switching period
T_sw := 1/f_sw
T_sw = 10 μs
t := 0, T_sw/1000 .. T_sw
# Duty cycle
i_max := rows(P_in) - 1
i := 0 .. i_max
D := V_out/V_in
D = 0.239074
# Input current
I_in := P_in/V_in
I_in = 0.0462046 A
# Inductor temperature rise
ΔT_L := 0 K  # (considerei 0 por não ter as constantes do indutor)
T_L := T_amb + ΔT_L
T_L = 289.05 K
# Inductor parameters at operating point
L_L_op := L - 0.2*L/I_Lsat*I_in/D
L = 553 μH
L_L_op = 545.875 μH
Vμs_L := (V_in - V_out)*D*T_sw
Vμs_L = 727.598 V*μs
B_pk := Vμs_L/Vμs_100*100*G
B_pk = 6058.26 gauss
B_pk1 := 0.3 T
f_e := 2/π^2*f_sw/(D - D^2)
f_e = 111.392 kHz
L_R_op := L_R*((1.1 K + T_L)/(259.5 K))
L_R_op = 402.52 mΩ
# GaN HS switch temperature
T_QH := T_amb + 10*D*ΔT_L
T_QH = 289.05 K
# GaN LS switch temperature
T_QL := T_amb + 10*(1 - D)*ΔT_L
T_QL = 289.05 K
# Main switch resistance at operating point
QH_R_DS = 150 mΩ
QH_R_op := QH_R_DS + QH_R_DS*(QH_k_temp*(T_QH - 298.15 K))
QH_R_op = 150 mΩ
# Freewheeling switch resistance at operating point
QL_R_DS = 150 mΩ
QL_R_op := QL_R_DS + QL_R_DS*(QL_k_temp*(T_QL - 298.15 K))
QL_R_op = 150 mΩ
# Inductor current
ΔI_L := (V_in - V_out)*D*T_sw/L_L_op
ΔI_L = 1.3329 A
I_L_max := I_in/D + ΔI_L/2
I_L_max = 0.859716 A
I_L_min := I_in/D - ΔI_L/2
I_L_min = -0.473186 A
I_L(t, i) :=
    (V_in - V_out)*t/L_L_op + I_L_min if 0 ≤ t ≤ D*T_sw
    -V_out*(t - D/f_sw)/L_L_op + I_L_max otherwise
I_L_avg := 1/T_sw*integral(I_L(t, i), t = 0 .. T_sw)
I_L_avg = 0.19306 A
I_L_rms := sqrt(1/T_sw*integral(I_L(t, i)^2, t = 0 .. T_sw))
I_L_rms = 0.430201 A
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# GaN HS switch current
I_QH(t, i) :=
    I_L(t, i) if 0 ≤ t ≤ D*T_sw
    I_L(t, i)*0 otherwise
I_QH_avg := 1/T_sw*integral(I_QH(t, i), t = 0 .. T_sw)
I_QH_avg = 0.0393822 A
I_QH_rms := sqrt(1/T_sw*integral(I_QH(t, i)^2, t = 0 .. T_sw))
I_QH_rms = 0.19583 A
# GaN LS switch current (channel path)
I_QL(t, i) :=
    I_L(t, i) if D*T_sw + t_d ≤ t ≤ T_sw - t_d
    I_L(t, i)*0 otherwise
I_QL_avg := 1/T_sw*integral(I_QL(t, i), t = 0 .. T_sw)
I_QL_avg = 0.12741 A
I_QL_rms := sqrt(1/T_sw*integral(I_QL(t, i)^2, t = 0 .. T_sw))
I_QL_rms = 0.343424 A
# GaN LS switch current (reverse diode path)
I_QL_D(t, i) :=
    I_L(t, i) if D*T_sw ≤ t ≤ D*T_sw + t_d
    I_L(t, i) if T_sw - t_d ≤ t ≤ T_sw
    I_L(t, i)*0 otherwise
I_QL_avg_D := |1/T_sw*integral(I_QL_D(t, i), t = 0 .. T_sw)|
I_QL_avg_D = 26.2687 mA
# GaN HS gate currents
I_QH_G_on := (V_GS - QH_V_PL)/(R_dvr_on + R_G_on + QH_R_G)
I_QH_G_on = 0.184211 A
I_QH_G_off := (V_GS - QH_V_PL)/(R_dvr_off + R_G_off + QH_R_G)
I_QH_G_off = 0.313433 A
# GaN HS switching times
t_QH_on := (QH_Q_GS - QH_Q_th + QH_Q_GD)/I_QH_G_on
t_QH_on = 0.542857 ns
t_QH_off := (QH_Q_GS - QH_Q_th + QH_Q_GD)/I_QH_G_off
t_QH_off = 0.319048 ns
# Power losses
# Inductor
# [area: Copper Losses]
# Copper resistivity correction, according to the winding temperature
R_Cu := 1.72*10^-6*Ω*cm  # ................................................................ Copper resistivity
le := 4.84 cm  # ...................................................................... Core path effective length
Ne := 36  # .......................................................................,.. Number of turns
Ncond := 20  # ............................. Number of paralleled conductors
S_isolation := 0.0201 mm^2  # .................. AWG 34
k_w := 39.045 %  # .................. Resultant window utilization factor
S_w_calc := Ne*Ncond*S_isolation/k_w = 37.0649 mm^2
S_w_direto := 0.4444 mm^2
R_Cu = 1.72e-8 kg*m^3/(A^2*s^3)
α_Cu := 3.93*10^-3
T_ind := 49.5
ΔT := T_ind - T_amb_C = 33.6
Rf_Cu := R_Cu*(1 + α_Cu*ΔT) = 1.94712e-8 kg*m^3/(A^2*s^3)
PL_Cu := I_L_rms^2*Rf_Cu*le*Ne/S_w_direto = 14.129 mW
# [area: Core Losses]
Pt_adim := 9*10^-5*T_ind^3 + 0.0575*T_ind^2 - 13.445*T_ind + 980.48 = 466.758
Pt := Pt_adim*kW/m^3 = 466.758 kW/m^3
Ve_PQ3220 := 7.46 cm^3
P_Lnucleo := Pt*Ve_PQ3220 = 3.48201 W
# [area: Total Inductor Losses]
P_Lbuck := PL_Cu + P_Lnucleo = 3.49614 W
# SiC Schottky Diode
# [area: SiC Schottky Diode Losses - according to Datasheet and Theyllor Dissertation (2019)]
# Perdas durante o Bloqueio do Diodo
V_in = 399.96 V
D = 0.239074
I_Dr := 25 μA
P_Dbloq := I_Dr*V_in*D = 2.3905 mW
# Perdas associadas ao tempo de recuperação reversa
I_Dbuck := I_QL_avg_D = 26.2687 mA  # GaN LS switch current in the reverse diode path
t_rr := 0 s  # (consta no datasheet e é uma das vantagens de um diodo feito de SiC)
P_Doff := I_Dbuck*V_in*t_rr*f_sw/4 = 0 W
# Perdas por Condução
V_F := 2.1 V
P_Dcond := V_F*I_QL_avg_D = 55.1643 mW
P_SiC := P_Dbloq + P_Doff + P_Dcond = 57.5548 mW
# GaN HS switch
P_QH_cond := 1*QH_R_op*I_QH_rms^2
P_QH_cond = 0.00575241 W
P_QH_Coss := 1/2*(QH_C_oss - QH_C_rss)*V_in^2*f_sw
P_QH_Coss = 0.156769 W
P_QH_on := |(f_sw*V_in*I_L_min*t_QH_on)/2|
P_QH_on = 0.00513693 W
P_QH_off := (f_sw*V_in*I_L_max*t_QH_off)/2
P_QH_off = 5.48526 mW
P_QH_QG := QH_Q_G*f_sw*(6 V - 0 V) = 1.32 mW
P_QH_QG = 1.32 mW
P_QH_sw := P_QH_Coss + P_QH_on + P_QH_off + P_QH_QG
P_QH_sw = 168.711 mW
P_QH := P_QH_cond + P_QH_sw
P_QH = 174.463 mW
# GaN LS switch
P_QL_cond := 1*QL_R_op*I_QL_rms^2
P_QL_cond = 0.017691 W  # (considerando um aumento de 1,65X da RDSon em função da temperatura, em torno de 85-86°C)
P_QL_Coss := 1/2*(QL_C_oss - QL_C_rss)*V_in^2*f_sw
P_QL_Coss = 0.156769 W
P_QL_QG := QL_Q_G*f_sw*(6 V - 0 V) = 1.32 mW
P_QL_QG = 1.32 mW
P_QL_sw := P_QL_Coss + P_QL_QG
P_QL_sw = 158.089 mW
P_QL_D := QL_V_SD*I_QL_avg_D
P_QL_D = 44.6568 mW
P_QL := P_QL_cond + P_QL_sw + P_QL_D
P_QL = 220.437 mW
# EMI Filter Losses - Common Mode Inductor only
Bmax_EMI := 0.3 T
k_h := 4*10^-5*W*s*T^-2.4*cm^-3
k_f := 4*10^-10*W*s*T^-2.4*cm^-3
R_L.EMI := 0.1532 Ω
V_e.EMI := 0.394 cm^3
I_LED_avg := 182.08 mA
I_rms_EMI := I_LED_avg = 0.18208 A
P_Cu_EMI := R_L.EMI*I_rms_EMI^2 = 0.00507906 W
P_nucleo_EMI := Bmax_EMI^2.4*(k_h + k_f)*f_sw*V_e.EMI = 0.0876297 W
P_EMI := P_Cu_EMI + P_nucleo_EMI = 0.0927088 W
# Total Losses and Efficiency
P_loss := P_QH + P_QL + P_Lbuck + P_EMI + P_SiC = 4.04131 W
P_loss = 4.04131 W
η := (P_in - P_loss)/P_in = 0.781315
η = 78.1315 %
Error := η_meas - η = 16.2645 %
Error = 16.2645 %
